# OpenSim document version 40600
ForceSet reserve_actuators:
  CoordinateActuator [values shared by the 6 below unless stated]: optimal_force=100 min_control=-2 max_control=2
  CoordinateActuator residual_pelvis_tilt: coordinate=pelvis_tilt
  CoordinateActuator residual_pelvis_list: coordinate=pelvis_list
  CoordinateActuator residual_pelvis_rotation: coordinate=pelvis_rotation
  CoordinateActuator residual_pelvis_tx: coordinate=pelvis_tx optimal_force=500
  CoordinateActuator residual_pelvis_ty: coordinate=pelvis_ty
  CoordinateActuator residual_pelvis_tz: coordinate=pelvis_tz
